$PROBLEM 1depot0delays_PRED

$INPUT ID TIME T_D DV EVID MDV
- for simulation DV is not required

$DATA E:\Project\NIKR\ExplicitSolutions\Data\PREDdata.csv IGNORE "

$PRED
DUM1=THETA(1)
DUM2=ERR(1)
DOSE=1
KA=0.1
KE=1
BA=1
Y=BA*DOSE*KA/(KE-KA)*(EXP(-KA*(TIME-T_D))-EXP(-KE*TIME))


$THETA 0 FIX
$OMEGA 0 FIX

$SIMULATION (123) ONLYSIMULATION

$TABLE ID TIME EVID NOPRINT ONEHEADER FILE=TABLE.PAR
